Mon 30/03/2015
02:43 p.m.
$PROB WARFARIN PKPD
;
;O'REILLY RA, AGGELER PM. STUDIES ON COUMARIN ANTICOAGULANT DRUGS
;INITIATION OF WARFARIN THERAPY WITHOUT A LOADING DOSE.
;CIRCULATION 1968;38:169-177
;
;O'REILLY RA, AGGELER PM, LEONG LS. STUDIES OF THE COUMARIN ANTICOAGULANT
;DRUGS: THE PHARMACODYNAMICS OF WARFARIN IN MAN.
;JOURNAL OF CLINICAL INVESTIGATION 1963;42(10):1542-1551
;
$INPUT ID TIME WT AGE SEX DVID DV MDV EVID CMT AMT
$DATA ..\ka1_to_emax1_simln.csv
IGNORE (DVID.EQ.2)

$EST MAX=9990 NSIG=3 SIGL=9 PRINT=1
METHOD=COND INTER NOABORT

$THETA
(0.01,0.132,1) ; POP_CL L/H/70KG
(0.01,8.24,20) ; POP_V L/70KG
(0.01,0.766,24) ; POP_TABS H
(0.01,0.896,24) ; POP_LAG H
$OMEGA BLOCK(4)
0.0635 ; PPV_CL
-0.00229 0.0175 ; PPV_V
0.00836 -0.0142 0.651 ; PPV_TABS
-0.0051 0.184 -1.41 4.45 ; PPV_LAG
$SIGMA 0.00658 ; RUV_CV
$SIGMA 0.134 ; RUV_SD MG/L

$SUBR ADVAN2 TRAN2

$PK

   IF (NEWIND.EQ.0) LN2=LOG(2)

   FSZV=WT/70
   FSZCL=FSZV**0.75

   CL=FSZCL*THETA(1)*EXP(ETA(1))
   V=FSZV*THETA(2)*EXP(ETA(2))
   TABS=THETA(3)*EXP(ETA(3))
   TLAG=THETA(4)*EXP(ETA(4))

   KA=LN2/TABS
   ALAG1=TLAG
   S2=V

$ERROR

   CP=A(2)/S2
   Y=CP*(1+ERR(1)) + ERR(2)

$TABLE ID TIME DVID Y
ONEHEADER NOPRINT FILE=ka1_blk.fit

NM-TRAN MESSAGES
 WARNINGS AND ERRORS (IF ANY) FOR PROBLEM    1
 (WARNING  2) NM-TRAN INFERS THAT THE DATA ARE POPULATION.

1NONLINEAR MIXED EFFECTS MODEL PROGRAM (NONMEM) VERSION 7.3.0
 ORIGINALLY DEVELOPED BY STUART BEAL, LEWIS SHEINER, AND ALISON BOECKMANN
 CURRENT DEVELOPERS ARE ROBERT BAUER, ICON DEVELOPMENT SOLUTIONS,
 AND ALISON BOECKMANN. IMPLEMENTATION, EFFICIENCY, AND STANDARDIZATION
 PERFORMED BY NOUS INFOSYSTEMS.
 PROBLEM NO.:         1
 WARFARIN PKPD
 TOT. NO. OF OBS RECS:      251
 TOT. NO. OF INDIVIDUALS:     32
 ONE COMPARTMENT MODEL WITH FIRST-ORDER ABSORPTION (ADVAN2)
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 #TBLN:      1
 #METH: First Order Conditional Estimation with Interaction
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
 #TERM:
0MINIMIZATION TERMINATED
 DUE TO ROUNDING ERRORS (ERROR=134)
 NO. OF FUNCTION EVALUATIONS USED:      345
 NO. OF SIG. DIGITS IN FINAL EST.:  2.6
 ADDITIONAL PROBLEMS OCCURRED WITH THE MINIMIZATION.
 REGARD THE RESULTS OF THE ESTIMATION STEP CAREFULLY, AND ACCEPT THEM ONLY
 AFTER CHECKING THAT THE COVARIANCE STEP PRODUCES REASONABLE OUTPUT.

 ETABAR IS THE ARITHMETIC MEAN OF THE ETA-ESTIMATES,
 AND THE P-VALUE IS GIVEN FOR THE NULL HYPOTHESIS THAT THE TRUE MEAN IS 0.

 ETABAR:        -3.2759E-03 -1.1157E-02  1.3749E-01 -9.8231E-02
 SE:             4.4299E-02  2.1519E-02  7.4001E-02  8.5936E-02
 N:                      32          32          32          32

 P VAL.:         9.4105E-01  6.0411E-01  6.3169E-02  2.5301E-01

 ETAshrink(%):   1.3471E+00  9.0002E+00  4.7654E+01  1.9422E+01
 EBVshrink(%):   2.2127E+00  1.2819E+01  4.3648E+01  2.3524E+01
 EPSshrink(%):   1.3960E+01  1.3366E+01

 #TERE:
 Elapsed estimation time in seconds:     4.95

 ********************               FIRST ORDER CONDITIONAL ESTIMATION WITH INTERACTION              ********************
 #OBJT:**************                       MINIMUM VALUE OF OBJECTIVE FUNCTION                      ********************
 #OBJV:********************************************      189.366       **************************************************

 ********************               FIRST ORDER CONDITIONAL ESTIMATION WITH INTERACTION              ********************
 ********************                             FINAL PARAMETER ESTIMATE                           ********************

 THETA - VECTOR OF FIXED EFFECTS PARAMETERS   *********
         TH 1      TH 2      TH 3      TH 4
         1.31E-01  8.17E+00  7.92E-01  9.60E-01

 OMEGA - COV MATRIX FOR RANDOM EFFECTS - ETAS  ********
            ETA1      ETA2      ETA3      ETA4
 ETA1
+        6.66E-02
 ETA2
+       -2.36E-03  1.85E-02
 ETA3
+        9.23E-03 -1.59E-02  6.60E-01
 ETA4
+       -5.08E-03  6.50E-02 -3.48E-01  3.76E-01

 SIGMA - COV MATRIX FOR RANDOM EFFECTS - EPSILONS  ****
            EPS1      EPS2
 EPS1
+        6.19E-03
 EPS2
+        0.00E+00  1.27E-01

 OMEGA - CORR MATRIX FOR RANDOM EFFECTS - ETAS  *******
            ETA1      ETA2      ETA3      ETA4
 ETA1
+        2.58E-01
 ETA2
+       -6.73E-02  1.36E-01
 ETA3
+        4.40E-02 -1.44E-01  8.13E-01
 ETA4
+       -3.21E-02  7.80E-01 -7.00E-01  6.13E-01

 SIGMA - CORR MATRIX FOR RANDOM EFFECTS - EPSILONS  ***
            EPS1      EPS2
 EPS1
+        7.87E-02
 EPS2
+        0.00E+00  3.56E-01
 #CPUT: Total CPU Time in Seconds,        4.368
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