Mon 30/03/2015
03:18 p.m.
$PROB WARFARIN PKPD

;O'REILLY RA, AGGELER PM. STUDIES ON COUMARIN ANTICOAGULANT DRUGS
;INITIATION OF WARFARIN THERAPY WITHOUT A LOADING DOSE.
;CIRCULATION 1968;38:169-177
;
;O'REILLY RA, AGGELER PM, LEONG LS. STUDIES OF THE COUMARIN ANTICOAGULANT
;DRUGS: THE PHARMACODYNAMICS OF WARFARIN IN MAN.
;JOURNAL OF CLINICAL INVESTIGATION 1963;42(10):1542-1551

$INPUT ID TIME WT AGE SEX DVID DV MDV EVID CMTX AMT
$DATA ..\ka1_to_emax1_simln.csv

$EST MAX=9990 NSIG=3 SIGL=9 PRINT=1
METHOD=COND INTER NOABORT
$COV

$THETA
(0.01,0.131,1) FIX ; POP_CL L/H/70KG
(0.01,8.06,20) FIX ; POP_V L/70KG
(0.01,0.944,24) FIX ; POP_TABS H
(0.01,1.03,24) FIX ; POP_LAG H
$OMEGA
0.0649 FIX ; PPV_CL
0.0201 FIX ; PPV_V
0.447 FIX ; PPV_TABS
0.311 FIX ; PPV_LAG
$SIGMA 0.00478 FIX ; RUV_CV
$SIGMA 0.135 FIX ; RUV_SD MG/L

$THETA
(0.01,96.2,200) ; POP_E0
(-INF,-168.,0) ; POP_EMAX
(0.01,5.84,100) ; POP_C50
(0.01,39.9,100) ; POP_TEQ
$OMEGA
0.0017 ; PPV_E0
0 FIX ; PPV_EMAX
0.0305 ; PPV_C50
0.0373 ; PPV_TEQ
$SIGMA 15.9 ; RUV_FX

$SUBR ADVAN4 TRAN4

$PK

   IF (NEWIND.EQ.0) LN2=LOG(2)

   FSZV=WT/70
   FSZCL=FSZV**0.75

   CL=FSZCL*THETA(1)*EXP(ETA(1))
   V=FSZV*THETA(2)*EXP(ETA(2))
   TABS=THETA(3)*EXP(ETA(3))
   TLAG=THETA(4)*EXP(ETA(4))

   E0=THETA(5)*EXP(ETA(5))
   EMAX=THETA(6)*EXP(ETA(6))
   C50=THETA(7)*EXP(ETA(7))
   TEQ=THETA(8)*EXP(ETA(8))

   KEQ=LN2/TEQ
   KA=LN2/TABS
   ALAG1=TLAG
   S2=V
   V2=V
   V3=V2*0.0001
   Q=V3*KEQ

$ERROR

   CP=A(2)/S2
   CE=A(3)/V3
   PCA=E0 + EMAX*CE/(C50+CE)
   IF (DVID.LE.1) THEN
      Y=CP*(1+ERR(1)) + ERR(2)
   ENDIF
   IF (DVID.EQ.2) THEN
      Y=PCA + ERR(3)
   ENDIF

$TABLE ID TIME DVID CP CE PCA Y
ETA1 ETA2 ETA3 ETA4 ETA5 ETA6 ETA7 ETA8
ONEHEADER NOPRINT FILE=ka1_ce_emax_est.fit

NM-TRAN MESSAGES
 WARNINGS AND ERRORS (IF ANY) FOR PROBLEM    1
 (WARNING  2) NM-TRAN INFERS THAT THE DATA ARE POPULATION.
 (WARNING  3) THERE MAY BE AN ERROR IN THE ABBREVIATED CODE. THE FOLLOWING
 ONE OR MORE RANDOM VARIABLES ARE DEFINED WITH "IF" STATEMENTS THAT DO NOT
 PROVIDE DEFINITIONS FOR BOTH THE "THEN" AND "ELSE" CASES. IF ALL
 CONDITIONS FAIL, THE VALUES OF THESE VARIABLES WILL BE ZERO.
   Y

1NONLINEAR MIXED EFFECTS MODEL PROGRAM (NONMEM) VERSION 7.3.0
 ORIGINALLY DEVELOPED BY STUART BEAL, LEWIS SHEINER, AND ALISON BOECKMANN
 CURRENT DEVELOPERS ARE ROBERT BAUER, ICON DEVELOPMENT SOLUTIONS,
 AND ALISON BOECKMANN. IMPLEMENTATION, EFFICIENCY, AND STANDARDIZATION
 PERFORMED BY NOUS INFOSYSTEMS.
 PROBLEM NO.:         1
 WARFARIN PKPD
 TOT. NO. OF OBS RECS:      483
 TOT. NO. OF INDIVIDUALS:     32
 TWO COMPARTMENT MODEL WITH FIRST-ORDER ABSORPTION (ADVAN4)
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 #TBLN:      1
 #METH: First Order Conditional Estimation with Interaction
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
 #TERM:
0MINIMIZATION SUCCESSFUL
 HOWEVER, PROBLEMS OCCURRED WITH THE MINIMIZATION.
 REGARD THE RESULTS OF THE ESTIMATION STEP CAREFULLY, AND ACCEPT THEM ONLY
 AFTER CHECKING THAT THE COVARIANCE STEP PRODUCES REASONABLE OUTPUT.
 NO. OF FUNCTION EVALUATIONS USED:      324
 NO. OF SIG. DIGITS IN FINAL EST.:  3.3

 ETABAR IS THE ARITHMETIC MEAN OF THE ETA-ESTIMATES,
 AND THE P-VALUE IS GIVEN FOR THE NULL HYPOTHESIS THAT THE TRUE MEAN IS 0.

 ETABAR:        -4.2195E-04  4.4618E-03  1.1035E-01  5.1143E-02  9.9291E-04  0.0000E+00 -1.4816E-03 -2.7479E-03
 SE:             4.4442E-02  2.2070E-02  6.3803E-02  3.2157E-02  5.3818E-03  0.0000E+00  2.6305E-02  2.6663E-02
 N:                      32          32          32          32          32          32          32          32

 P VAL.:         9.9242E-01  8.3979E-01  8.3704E-02  1.1174E-01  8.5363E-01  1.0000E+00  9.5508E-01  9.1791E-01

 ETAshrink(%):   1.0000E-10  1.0532E+01  4.5152E+01  6.6859E+01  2.5076E+01  1.0000E+02  1.3500E+01  2.0672E+01
 EBVshrink(%):   2.1024E+00  1.0139E+01  4.0091E+01  5.0101E+01  2.6403E+01  0.0000E+00  1.4706E+01  2.1405E+01
 EPSshrink(%):   1.4617E+01  1.0000E-10  1.5590E+01

 #TERE:
 Elapsed estimation time in seconds:    11.81
 Elapsed covariance time in seconds:     4.14

 ********************               FIRST ORDER CONDITIONAL ESTIMATION WITH INTERACTION              ********************
 #OBJT:**************                       MINIMUM VALUE OF OBJECTIVE FUNCTION                      ********************
 #OBJV:********************************************     1334.120       **************************************************

 ********************               FIRST ORDER CONDITIONAL ESTIMATION WITH INTERACTION              ********************
 ********************                             FINAL PARAMETER ESTIMATE                           ********************

 THETA - VECTOR OF FIXED EFFECTS PARAMETERS   *********
         TH 1      TH 2      TH 3      TH 4      TH 5      TH 6      TH 7      TH 8
         1.31E-01  8.06E+00  9.44E-01  1.03E+00  9.62E+01 -1.68E+02  5.84E+00  3.99E+01

 OMEGA - COV MATRIX FOR RANDOM EFFECTS - ETAS  ********
            ETA1      ETA2      ETA3      ETA4      ETA5      ETA6      ETA7      ETA8
 ETA1
+        6.49E-02
 ETA2
+        0.00E+00  2.01E-02
 ETA3
+        0.00E+00  0.00E+00  4.47E-01
 ETA4
+        0.00E+00  0.00E+00  0.00E+00  3.11E-01
 ETA5
+        0.00E+00  0.00E+00  0.00E+00  0.00E+00  1.70E-03
 ETA6
+        0.00E+00  0.00E+00  0.00E+00  0.00E+00  0.00E+00  0.00E+00
 ETA7
+        0.00E+00  0.00E+00  0.00E+00  0.00E+00  0.00E+00  0.00E+00  3.05E-02
 ETA8
+        0.00E+00  0.00E+00  0.00E+00  0.00E+00  0.00E+00  0.00E+00  0.00E+00  3.73E-02

 SIGMA - COV MATRIX FOR RANDOM EFFECTS - EPSILONS  ****
            EPS1      EPS2      EPS3
 EPS1
+        4.78E-03
 EPS2
+        0.00E+00  1.35E-01
 EPS3
+        0.00E+00  0.00E+00  1.59E+01

 OMEGA - CORR MATRIX FOR RANDOM EFFECTS - ETAS  *******
            ETA1      ETA2      ETA3      ETA4      ETA5      ETA6      ETA7      ETA8
 ETA1
+        2.55E-01
 ETA2
+        0.00E+00  1.42E-01
 ETA3
+        0.00E+00  0.00E+00  6.69E-01
 ETA4
+        0.00E+00  0.00E+00  0.00E+00  5.58E-01
 ETA5
+        0.00E+00  0.00E+00  0.00E+00  0.00E+00  4.13E-02
 ETA6
+        0.00E+00  0.00E+00  0.00E+00  0.00E+00  0.00E+00  0.00E+00
 ETA7
+        0.00E+00  0.00E+00  0.00E+00  0.00E+00  0.00E+00  0.00E+00  1.75E-01
 ETA8
+        0.00E+00  0.00E+00  0.00E+00  0.00E+00  0.00E+00  0.00E+00  0.00E+00  1.93E-01

 SIGMA - CORR MATRIX FOR RANDOM EFFECTS - EPSILONS  ***
            EPS1      EPS2      EPS3
 EPS1
+        6.91E-02
 EPS2
+        0.00E+00  3.67E-01
 EPS3
+        0.00E+00  0.00E+00  3.99E+00

 ********************               FIRST ORDER CONDITIONAL ESTIMATION WITH INTERACTION              ********************
 ********************                            STANDARD ERROR OF ESTIMATE                          ********************

 THETA - VECTOR OF FIXED EFFECTS PARAMETERS   *********
         TH 1      TH 2      TH 3      TH 4      TH 5      TH 6      TH 7      TH 8
        ......... ......... ......... .........  1.02E+00  1.15E+01  7.42E-01  1.49E+00

 OMEGA - COV MATRIX FOR RANDOM EFFECTS - ETAS  ********
            ETA1      ETA2      ETA3      ETA4      ETA5      ETA6      ETA7      ETA8
 ETA1
+       .........
 ETA2
+       ......... .........
 ETA3
+       ......... ......... .........
 ETA4
+       ......... ......... ......... .........
 ETA5
+       ......... ......... ......... .........  6.33E-04
 ETA6
+       ......... ......... ......... ......... ......... .........
 ETA7
+       ......... ......... ......... ......... ......... .........  1.71E-02
 ETA8
+       ......... ......... ......... ......... ......... ......... .........  2.31E-02

 SIGMA - COV MATRIX FOR RANDOM EFFECTS - EPSILONS  ****
            EPS1      EPS2      EPS3
 EPS1
+       .........
 EPS2
+       ......... .........
 EPS3
+       ......... .........  2.33E+00

 OMEGA - CORR MATRIX FOR RANDOM EFFECTS - ETAS  *******
            ETA1      ETA2      ETA3      ETA4      ETA5      ETA6      ETA7      ETA8
 ETA1
+       .........
 ETA2
+       ......... .........
 ETA3
+       ......... ......... .........
 ETA4
+       ......... ......... ......... .........
 ETA5
+       ......... ......... ......... .........  7.67E-03
 ETA6
+       ......... ......... ......... ......... ......... .........
 ETA7
+       ......... ......... ......... ......... ......... .........  4.88E-02
 ETA8
+       ......... ......... ......... ......... ......... ......... .........  5.99E-02

 SIGMA - CORR MATRIX FOR RANDOM EFFECTS - EPSILONS  ***
            EPS1      EPS2      EPS3
 EPS1
+       .........
 EPS2
+       ......... .........
 EPS3
+       ......... .........  2.93E-01
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 #CPUT: Total CPU Time in Seconds,       15.600
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